# The user requirements document gives the properties of the pipe that must be bent by
# the battery operated bending tool. Those properties are:
# Pipe yield strength:
T_yield := 650*MPa
# Pipe thickness:
t := 1.5 mm
# Pipe outer diameter:
OD := 6 mm
# Using the pipe outer diameter and thickness, the inner diameter can be calculated.
# Pipe inner diameter:
ID := OD - 2*t
ID = 3 mm
# Using the above pipe properties, the required bending moment to bend the pipe can be calculated.
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# Figure 1: Bending stress formula
#
# The above formula is taken from a book called "Mechanic of Materials" 11th edition, written by Russell C. Hibbeler
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# Figure 1: Section modulus formula
#
# The above formula is taken from a book called "Mechanic of Materials" 11th edition, written by Russell C. Hibbeler.
# Section Modulus:
SM := π*(OD^4 - ID^4)/(32*OD)
SM = 19.8804 mm^3
# Bending moment required:
M_required := SM*T_yield
M_required = 12.9223 N*m
# Now that the required bending moment is calculated, the gearbox should be designed
# such that the torque of the last gears is greater or equal to the required bending moment.
