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# Figure 1: Typical costing inputs
#
# The above costing formulae will be used to calculate cost, the of each part is already determined in Appendix E.
# 3D printed parts
# Battery holder
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m_bh := 0.037 kg
C_bh := 700/kg*m_bh + 65
C_bh = 90.9
# Motor lifter
m_ml := 0.003 kg
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C_ml := 700/kg*m_ml + 65
C_ml = 67.1
# Lower housing
m_lh := 0.16 kg
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C_lh := 700/kg*m_lh + 65
C_lh = 177
# Upper housing
m_uh := 0.149 kg
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C_uh := 700/kg*m_uh + 65
C_uh = 169.3
# Handle
m_h := 0.097 kg
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C_h := 700/kg*m_h + 65
C_h = 132.9
# Angle lock
m_al := (5.079*10^-4) kg
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C_al := 700/kg*m_al + 65
C_al = 65.3555
# Microswitch holder
m_mch := 0.004 kg
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C_mch := 700/kg*m_mch + 65
C_mch = 67.8
# Microswitch holder two
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m_mcht := 0.004 kg
C_mcht := 700/kg*m_mcht + 65
C_mcht = 67.8
# Two microswitch upper holders
m_muh := 0.004 kg
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C_muh := 700/kg*m_muh + 65
C_muh = 67.8
# Two battery clamps
m_b_c := 0.011 kg
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C_b_c := 700/kg*m_b_c + 65
C_b_c = 72.7
C_3D_p := C_bh + C_ml + C_lh + C_uh + C_h + C_al + C_mch + C_mcht + C_muh + C_b_c
C_3D_p = 978.656
# Sheet metal parts
# Base
m_base := 0.163 kg
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L_base := 593.79 mm
t_base := 1.6 mm
B_base := 2
C_base := 2.2*m_base/kg + 114*L_base/m*(t_base/(1 m))^0.2 + 9.6*B_base
C_base = 38.2379
# Lower shaft support
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m_lss := 0.034 kg
L_lss := 478.77 mm
t_lss := 1 mm
B_lss := 0
C_lss := 2.2*m_lss/kg + 114*L_lss/m*(t_lss/(1 m))^0.2 + 9.6*B_lss
C_lss = 13.7846
# Upper shaft support
m_uss := 0.041 kg
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L_uss := 427.18 mm
t_uss := 1 mm
B_uss := 4
C_uss := 2.2*m_uss/kg + 114*L_uss/m*(t_uss/(1 m))^0.2 + 9.6*B_uss
C_uss = 50.7227
# Motor support
m_m_s := 0.037 kg
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L_m_s := 615.6 mm
t_m_s := 1.6 mm
B_m_s := 4
C_m_s := 2.2*m_m_s/kg + 114*L_m_s/m*(t_m_s/(1 m))^0.2 + 9.6*B_m_s
C_m_s = 57.8468
# Two sheet support
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m_sheet_s := 0.009 kg
L_sheet_s := 120.19 mm
t_sheet_s := 1.6 mm
B_sheet_s := 0
C_sheet_s := 2.2*m_sheet_s/kg + 114*L_sheet_s/m*(t_sheet_s/(1 m))^0.2 + 9.6*B_sheet_s
C_m_s = 57.8468
# Two double plate for 48T gear
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m_D_48T := 0.049 kg
L_D_48T := 206.87 mm
t_D_48T := 2 mm
B_D_48T := 0
C_D_48T := 2.2*m_D_48T/kg + 114*L_D_48T/m*(t_D_48T/(1 m))^0.2 + 9.6*B_D_48T
C_D_48T = 6.91249
# Double plate for 36T gear
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m_D_36T := 0.006 kg
L_D_36T := 120.79 mm
t_D_36T := 1 mm
B_D_36T := 0
C_D_36T := 2.2*m_D_36T/kg + 114*L_D_36T/m*(t_D_36T/(1 m))^0.2 + 9.6*B_D_36T
C_D_36T = 3.47208
# Double plate for 24T gear
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m_D_24T := 0.002 kg
L_D_24T := 120.79 mm
t_D_24T := 1 mm
B_D_24T := 0
C_D_24T := 2.2*m_D_24T/kg + 114*L_D_24T/m*(t_D_24T/(1 m))^0.2 + 9.6*B_D_24T
C_D_24T = 3.46328
# Total cost of the machined parts:
C_s := C_base + C_lss + C_uss + C_m_s + C_sheet_s + C_D_48T + C_D_36T + C_D_24T
C_s = 178.241
# Machined parts
# Die positioner
m_Die_p := (8.888*10^-4) kg
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C_Die_p := 25/kg*m_Die_p + 300*15/60
C_Die_p = 75.0222
# Die lock
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m_Die_l := (9.615*10^-4) kg
C_Die_l := 25/kg*m_Die_l + 300*30/60
C_Die_l = 150.024
# Clamp platform
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m_Clamp_p := 0.024 kg
C_C_p := 25/kg*m_Clamp_p + 300*90/60
C_C_p = 450.6
# Circular custom shaft
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m_Custom_s := 0.002 kg
C_C_s := 25/kg*m_Custom_s + 300*30/60
C_C_s = 150.05
# Angle positioner
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m_Angle_p := (7.439*10^-4) kg
C_A_p := 25/kg*m_Angle_p + 300*15/60
C_A_p = 75.0186
# Bending die
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m_Die_b := 0.002 kg
C_Die_b := 25/kg*m_Die_b + 300*15/60
C_Die_b = 75.05
# Total cost of the machined parts:
C_machine := C_Die_p + C_Die_l + C_C_p + C_C_s + C_A_p + C_Die_b
C_machine = 975.765
# Bought parts
# Some parts will be bought.  Their mass is given.
# 100rpm Motor:
C_motor := 315
# Two 12T spur gears:
C_12T_s := 2*4.5 = 9
# Two 24T bevel gears:
C_24T_b := 2*6 = 12
# Two 36T spur gears:
C_36T_s := 2*18 = 36
# Two 48T spur gears:
C_48T_s := 2*9 = 18
# Square shaft 30 long:
C_30_sq := 160*30/1000 = 4.8
# Square shaft 70 long:
C_70_sq := 160*70/1000 = 11.2
# Square shaft 45 long:
C_45_sq := 160*45/1000 = 7.2
# Three high strength square shaft 30 long:
C_30_hsq := 3*160*30/1000 = 14.4
# Shaft coupler:
C_shaft_c := 25.5
# Four cells with caps:
C_cell_w_caps := 4*54 = 216
# Two cell links:
C_cell_link := 2*1 = 2
# Fused link:
C_fused_link := 25
# Two microswitches:
C_microswitch := 2*17 = 34
# Ten spacers 3.2 long:
C_3.2_spacer := 10*3 = 30
# Spacer 6.4 long:
C_6.4_spacer := 3
# Three spacers 9.5 long:
C_9.5_spacer := 3*3 = 9
# Two spacers 12.7 long:
C_12.7_spacer := 2*3 = 6
# Two button head screws:
C_b_screws := 2*3.5 = 7
# Six (2.9x6.5) self tapping screws:
C_2.9x6.5_screws := 6*1 = 6
# Twelve (3.5x9.5) self tapping screws:
C_3.5x9.5_screws := 12*1 = 12
# Four (4.2x16) self tapping screws:
C_4.2x16_screws := 12*1 = 12
# Twenty one (4.2x9.5) self tapping screws:
C_4.2x9.5_screws := 21*1 = 21
# Seven hex M5 (16x10) bolts:
C_16x10_bolt := 7*2 = 14
# Seven hex M5 nut:
C_M5_nut := 7*2 = 14
# Five hex M3 nut:
C_M3_nut := 5*2 = 10
# Six M5 washers:
C_M5_washer := 6*1 = 6
# Big roller:
C_Big_roller := 65 = 65
# Push button:
C_push_b := 75
# Control switch:
C_control_s := 65
C_1 := C_control_s + C_push_b + C_Big_roller + C_M5_washer + C_M5_nut + C_M3_nut + C_16x10_bolt + C_4.2x9.5_screws
C_2 := C_4.2x16_screws + C_3.5x9.5_screws + C_2.9x6.5_screws + C_b_screws + C_12.7_spacer + C_9.5_spacer + C_6.4_spacer
C_3 := C_3.2_spacer + C_microswitch + C_fused_link + C_cell_link + C_cell_w_caps + C_shaft_c + C_30_hsq + C_45_sq
C_4 := C_70_sq + C_30_sq + C_48T_s + C_36T_s + C_24T_b + C_12T_s + C_motor
C_4 := 15
# Total cost of the bought parts in rands:
C_bought := C_1 + C_2 + C_3 + C_4
C_bought = 694.1
# Labour cost
# The labour cost needs to be taken into account. The design needs to be assembled properly. An artisan will be perfect for this because they are skilled in manual labour fields such as:
#
# water technology (plumbing)
# engineering (electrical/mechanical/automotive etc)
# fashion
# building technology
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# Figure 1: average artisan salary
#
# The above figure is from talent.com
# Number of artisan needed:
N_artisan := 1
# Artisan cost:
C_artisan := 108/hr
# Number of hours that an artisan will work:
N_hours := 1.5 hr
# Labour cost:
C_labour := N_artisan*C_artisan*N_hours
C_labour = 162
# The prototype cost in rands:
C_tot := C_bought + C_machine + C_s + C_3D_p + C_labour
C_tot = 2988.76
# Development costs
# Development costs are commonly referred to as research and development costs. These costs can include a host of expenses, such as marketing analysis, developmental engineering and customer surveying.
#
# Activities that are typically considered as research and development include:
#
# Research to bring about new knowledge
# Creation of product and process designs
# Testing processes and products
# Modifying processes and products
# Designing prototypes
# Testing prototypes
# Designing new tools
# Certain number of engineers need to be assigned to perform the above mentioned activities.
#
# The cost per engineer needs to be stated and also how long it will take to complete research and development
# Number of engineers that will be assigned for R&D:
N_engineer := 2
# The cost of one engineer:
C_engineer := 200/hr
# Number of days dedicated for R&D per month:
N_days := 20
# Number of hours dedicated for R&D day:
N_hours := 8 hr
# Number of months it will take for research and development:
N_dev_months := 2
# Number of demonstrations needed:
N_demo := 4
# Prototype cost:
C_prototype := C_tot
C_prototype = 2988.76
# Using the above information, the development cost can be determined.
# Development cost:
C_development := N_demo*C_prototype + N_engineer*C_engineer*N_days*N_hours*N_dev_months
C_development = 139955
# Ramp-up costs
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# Figure 1: Mass production
#
# The above figure will be used to determine the cost of tooling.
# Complex parts will be made using single cavity simple injection mould
# Clamp platform
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# Calculated mass:
m_Clamp_p = 0.024 kg
# Diagonal size:
D_Clamp_p := 96.52 mm
# Tooling cost in rands:
T_Clamp_p := 25000 + 250/mm*D_Clamp_p
T_Clamp_p = 49130
# Stamped sheet metal parts needs steel stamping tool to create the desired shape
# Base
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# Calculated mass:
m_base = 0.163 kg
# Diagonal size:
D_base := 189.2 mm
# Tooling cost in rands:
T_base := 35000 + 250/mm*D_base
T_base = 82300
# Lower shaft support
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# Calculated mass:
m_lss = 0.034 kg
# Diagonal size:
D_lss := 121 mm
# Tooling cost in rands:
T_lss := 25000 + 250/mm*D_lss
T_lss = 55250
# Upper shaft support
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# Calculated mass:
m_uss = 0.041 kg
# Diagonal size:
D_uss := 142 mm
# Tooling cost in rands:
T_uss := 25000 + 250/mm*D_uss
T_uss = 60500
# Motor support
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# Calculated mass:
m_m_s = 0.037 kg
# Diagonal size:
D_m_s := 75.47 mm
# Tooling cost in rands:
T_m_s := 25000 + 250/mm*D_m_s
T_m_s = 43867.5
# Two sheet support
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# Calculated mass:
m_sheet_s = 0.009 kg
# Diagonal size:
D_sheet_s := 33.94 mm
# Tooling cost in rands:
T_sheet_s := 25000 + 250/mm*D_sheet_s
T_sheet_s = 33485
# Two double plate for 48T gear
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# Calculated mass:
m_D_48T = 0.049 kg
# Diagonal size:
D_D_48T := 48 mm
# Tooling cost in rands:
T_D_48T := 25000 + 250/mm*D_D_48T
T_D_48T = 37000
# Double plate for 36T gear
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# Calculated mass:
m_D_36T = 0.006 kg
# Diagonal size:
D_D_36T := 30 mm
# Tooling cost in rands:
T_D_36T := 25000 + 250/mm*D_D_36T
T_D_36T = 32500
# Double plate for 24T gear
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# Calculated mass:
m_D_24T = 0.002 kg
# Diagonal size:
D_D_24T := 20 mm
# Tooling cost in rands:
T_D_24T := 25000 + 250/mm*D_D_24T
T_D_24T = 30000
# Total tooling cost in rands:
T_tot := T_D_24T + T_D_36T + T_D_48T + T_sheet_s + T_m_s + T_uss + T_lss + T_base + T_Clamp_p
T_tot = 424032
# The following prototypes will be made:
# The number of the alpha prototypes:
N_alpha := 3
# The cost of each alpha prototype:
C_alpha := C_tot
C_alpha = 2988.76
# The number of the beta prototypes:
N_beta := 6
# The cost of each alpha prototype:
C_beta := C_tot*0.75
C_beta = 2241.57
# Total ramp-up cost:
C_ramp_up := T_tot + N_alpha*C_alpha + N_beta*C_beta
C_ramp_up = 446448
# Volume production cost
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# Figure 1: Mass production
#
# The above figure will be used to determine the cost of the volume production cost
# The following parts will be made with injection moulded ABS plastic
# Battery holder
# Calculated mass:
m_bh = 0.037 kg
# Production cost in rands:
P_bh := 20/kg*m_bh*2
P_bh = 1.48
# Motor lifter
# Calculated mass:
m_ml = 0.003 kg
# Production cost in rands:
P_ml := 20/kg*m_ml*2
P_ml = 0.12
# Lower housing
# Calculated mass:
m_lh = 0.16 kg
# Production cost in rands:
P_lh := 20/kg*m_lh*2
P_lh = 6.4
# Upper housing
# Calculated mass:
m_uh = 0.149 kg
# Production cost in rands:
P_uh := 20/kg*m_uh*2
P_uh = 5.96
# Handle
# Calculated mass:
m_h = 0.097 kg
# Production cost in rands:
P_h := 20/kg*m_h*2
P_h = 3.88
# Angle lock
# Calculated mass:
m_al = 0.0005079 kg
# Production cost in rands:
P_al := 20/kg*m_al*2
P_al = 0.020316
# Microswitch holder
# Calculated mass:
m_mch = 0.004 kg
# Production cost in rands:
P_mch := 20/kg*m_mch*2
P_mch = 0.16
# Microswitch holder two
# Calculated mass:
m_mcht = 0.004 kg
# Production cost in rands:
P_mcht := 20/kg*m_mcht*2
P_mcht = 0.16
# Two microswitch upper holders
# Calculated mass:
m_muh = 0.004 kg
# Production cost in rands:
P_muh := 2*20/kg*m_mcht*2
P_muh = 0.32
# Two battery clamps
# Calculated mass:
m_b_c = 0.011 kg
# Production cost in rands:
P_b_c := 2*20/kg*m_b_c*2
P_b_c = 0.88
# Total cost of injection moulded parts in rands:
P_injection := P_bh + P_ml + P_lh + P_uh + P_h + P_al + P_mch + P_mcht + P_muh + P_b_c
P_injection = 19.3803
# The following parts will be made by stamped sheet metal
# Base
# Calculated mass:
m_base = 0.163 kg
# Production cost in rands:
P_base := 25/kg*m_base*1.5
P_base = 6.1125
# Lower shaft support
# Calculated mass:
m_lss = 0.034 kg
# Production cost in rands:
P_lss := 25/kg*m_lss*1.5
P_lss = 1.275
# Upper shaft support
# Calculated mass:
m_uss = 0.041 kg
# Production cost in rands:
P_uss := 25/kg*m_uss*1.5
P_uss = 1.5375
# Motor support
# Calculated mass:
m_m_s = 0.037 kg
# Production cost in rands:
P_m_s := 25/kg*m_m_s*1.5
P_m_s = 1.3875
# Two sheet support
# Calculated mass:
m_sheet_s = 0.009 kg
# Production cost in rands:
P_sheet_s := 2*25/kg*m_sheet_s*1.5
P_sheet_s = 0.675
# Two double plate for 48T gear
# Calculated mass:
m_D_48T = 0.049 kg
# Production cost in rands:
P_D_48T := 2*25/kg*m_D_48T*1.5
P_D_48T = 3.675
# Double plate for 36T gear
# Calculated mass:
m_D_36T = 0.006 kg
# Production cost in rands:
P_D_36T := 25/kg*m_D_36T*1.5
P_D_36T = 0.225
# Double plate for 24T gear
# Calculated mass:
m_D_24T = 0.002 kg
# Production cost in rands:
P_D_24T := 25/kg*m_D_24T*1.5
P_D_24T = 0.075
# Total production cost of the stamped sheet metal parts in rands:
P_sheet := P_base + P_lss + P_uss + P_m_s + P_sheet_s + P_D_48T + P_D_36T + P_D_24T
P_sheet = 14.9625
# The following parts will be made with a CNC machine.
# Die positioner
# Calculated mass:
m_Die_p = 0.0008888 kg
# Production cost in rands:
P_Die_p := 25/kg*m_Die_p*1.5
P_Die_p = 0.03333
# Die lock
# Calculated mass:
m_Die_l = 0.0009615 kg
# Production cost in rands:
P_Die_l := 25/kg*m_Die_l*1.9
P_Die_l = 0.0456713
# Clamp platform
# Calculated mass:
m_Clamp_p = 0.024 kg
# Production cost in rands:
P_Clamp_p := 25/kg*m_Clamp_p*3
P_Clamp_p = 1.8
# Circular custom shaft
# Calculated mass:
m_Custom_s = 0.002 kg
# Production cost in rands:
P_Custom_s := 25/kg*m_Custom_s*2.1
P_Custom_s = 0.105
# Angle positioner
# Calculated mass:
m_Angle_p = 0.0007439 kg
# Production cost in rands:
P_Angle_p := 25/kg*m_Angle_p*1.5
P_Angle_p = 0.0278962
# Bending die
# Calculated mass:
m_Die_b = 0.002 kg
# Production cost in rands:
P_Die_b := 25/kg*m_Die_b*1.5
P_Die_b = 0.075
# Total production cost of the CNC machined parts:
P_CNC := P_Die_p + P_Die_l + P_Clamp_p + P_Custom_s + P_Angle_p + P_Die_b
P_CNC = 2.0869
# The cost of parts that will be bought "off the shelf" will remain the same.
# Total production cost of the "off the shelf" parts:
P_bought := C_bought
P_bought = 694.1
# The labour cost will remain the same.
# Total production cost due to labour in rands:
P_labour := C_labour
P_labour = 162
# Now the volume production cost per product can be determined by adding all the production costs.
# Volume production per product in rands:
P_volume := P_bought + P_CNC + P_sheet + P_injection + P_labour
P_volume = 892.53
