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# Figure 1: Shafts
#
# Figure 1 above shows all the shafts that will be used in the prototype. It also shows all the the gears on the each shaft.
# | Maximum Torque [Nm] | Experienced Torque [Nm] | Maximum tangential force [N] | Experienced tangential force [N] | Experienced radial force [N] | Rotational speed [rad/s]
# Gear 1 [12T] | 3 | 0.941 | 450 | 148.228 | 53.95 | 14.537
# Gear 2 [36T] | 3.4 | 2.627 | 700 | 137.879 | 50.184 | 4.508
# Gear 3 [24T] | 3 | 2.627 | 300 | 206.819 | 75.276 | 4.508
# Gear 4 [24T] | 3 | 2.489 | 300 | 195.99 | 71.335 | 4.272
# Gear 5 [12T] | 3 | 2.489 | 450 | 391.98 | 142.669 | 4.272
# Gear 6 [36T] | 3.4 | 6.946 | 700 | 364 | 132.709 | 1.324
# Gear 7 [24T] | 1 | 6.946 | 580 | 546.923 | 199.064 | 1.324
# Gear 8 [48T] | 1.2 | 13.269 | 580 | 522.417 | 190.144 | 0.638
# Gear 9 [48T] | 1.2 | 12.922 | 580 | 508.74 | 185.166 | 0.621
# Figure 1: Summary of the forces
#
# The above table the shows all the forces calculated in Appendix C which will be used in this section to determine the deflection of each gear.
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# The above deflection equation from "Mechanic of Materials" 11th edition, written by Russell C. Hibbeler, will be used to determine the deflection of the shaft.
# All the shafts are made with low carbon steel and will have the same elastic modulus. All the square shafts have the same cross section and will the same moment of inertia.
# Low carbon steel elastic modulus:
E_shaft := 200*GPa
# Cross sectional distance:
D_shaft := 3.18 mm
# Moment of inertia:
I_shaft := D_shaft^4/12
I_shaft = 8.52172 mm^4
# Shaft 1
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# Shaft 1 has 12T spur gear on it. Thus, it will experience both radial and tangential forces. Shaft 1 has low carbon steel material.
#
# Radial force will deflect the shaft vertically and the tangential force will deflect the shaft horizontally.
# Shaft 1 length:
L_shaft_1 := 30 mm
# Deflection due to radial force
# Radial force due to gear 1:
F_R_1 := 53.95 N
# The distance from the boundary the radial force:
a_r1 := 17.27 mm
# The distance from the other boundary the radial force:
b_r1 := L_shaft_1 - a_r1
b_r1 = 12.73 mm
# Maximum deflection caused by the radial force:
δ_r1 := F_R_1*b_r1*a_r1/(6*L_shaft_1*E_shaft*I_shaft)*(L_shaft_1^2 - b_r1^2 - a_r1^2)
δ_r1 = 0.0169994 mm
# Deflection due to tangential force
# Radial force due to gear 1:
F_T_1 := 148.228 N
# The distance from the boundary the radial force:
a_t1 := 17.27 mm
# The distance from the other boundary the radial force:
b_t1 := L_shaft_1 - a_r1
b_t1 = 12.73 mm
# Maximum deflection caused by the radial force:
δ_t1 := F_T_1*b_t1*a_t1/(6*L_shaft_1*E_shaft*I_shaft)*(L_shaft_1^2 - b_t1^2 - a_t1^2)
δ_t1 = 0.0467059 mm
# Shaft 2
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# Shaft 2 has 36T spur gear and 24T bevel gear on it. Thus, it will experience both radial and tangential forces.
#
# Radial force will deflect the shaft vertically and the tangential force will deflect the shaft horizontally.
# Shaft 2 length:
L_shaft_2 := 70 mm
# Shaft 2 will experience radial forces caused by the 36T spur gear and 24T bevel gear. The deflection of interest will be at the two points at where the gears are meshing.
# First meshing distance from the left:
b_2_1l1 := 16 mm
# First meshing distance from the right:
a_2_1r1 := L_shaft_2 - b_2_1l1
a_2_1r1 = 54 mm
# Second meshing distance from the left:
a_2_2l1 := 58 mm
# Second meshing distance from the right:
b_2_2r2 := L_shaft_2 - a_2_2l1
b_2_2r2 = 12 mm
# Deflection due to radial force
# Radial force due to 36T spur gear:
F_R_2_36T := 50.184 N
# Radial force due to 24T bevel gear:
F_R_2_24T := 75.276 N
# For 36T gear
# Deflection caused by the radial force of gear 2 at the mesh 2:
δ_r2_36T := F_R_2_36T*b_2_1l1*a_2_1r1/(6*L_shaft_2*E_shaft*I_shaft)*(L_shaft_2^2 - b_2_1l1^2 - a_2_1r1^2)
δ_r2_36T = 0.104669 mm
# Deflection caused by the radial force of gear 2 at the mesh 3:
δ_r3_36T := F_R_2_36T*b_2_2r2*b_2_1l1/(6*L_shaft_2*E_shaft*I_shaft)*(L_shaft_2^2 - b_2_2r2^2 - b_2_1l1^2)
δ_r3_36T = 0.0605721 mm
# For 24T gear
# Deflection caused by the radial force of gear 3
# at the mesh 2:
δ_r2_24T := F_R_2_24T*b_2_2r2*b_2_1l1/(6*L_shaft_2*E_shaft*I_shaft)*(L_shaft_2^2 - b_2_2r2^2 - b_2_1l1^2)
δ_r2_24T = 0.0908581 mm
# Deflection caused by the radial force of gear 3 at the mesh 3:
δ_r3_24T := F_R_2_24T*b_2_2r2*a_2_2l1/(6*L_shaft_2*E_shaft*I_shaft)*(L_shaft_2^2 - b_2_2r2^2 - a_2_2l1^2)
δ_r3_24T = 0.101882 mm
# Maximum deflection at mesh 2 due to radial forces:
δ_r2_max := δ_r2_36T + δ_r2_24T
δ_r2_max = 0.195527 mm
# Maximum deflection at mesh 3 due to radial forces:
δ_r3_max := δ_r3_36T + δ_r3_24T
δ_r3_max = 0.162454 mm
# Deflection due to tangential force
# Tangential force due to 36T spur gear:
F_T_2_36T := 137.879 N
# Tangential force due to 24T bevel gear:
F_T_2_24T := 206.819 N
# For 36T gear
# Deflection caused by the tangential force of gear 2 at the mesh 2:
δ_t2_36T := F_T_2_36T*b_2_1l1*a_2_1r1/(6*L_shaft_2*E_shaft*I_shaft)*(L_shaft_2^2 - b_2_1l1^2 - a_2_1r1^2)
δ_t2_36T = 0.287574 mm
# Deflection caused by the tangential force of gear 2 at the mesh 3:
δ_t3_36T := F_T_2_36T*b_2_2r2*b_2_1l1/(6*L_shaft_2*E_shaft*I_shaft)*(L_shaft_2^2 - b_2_2r2^2 - b_2_1l1^2)
δ_t3_36T = 0.16642 mm
# For 24T gear
# Deflection caused by the tangential force of gear 3
# at the mesh 2:
δ_t2_24T := F_T_2_24T*b_2_2r2*b_2_1l1/(6*L_shaft_2*E_shaft*I_shaft)*(L_shaft_2^2 - b_2_2r2^2 - b_2_1l1^2)
δ_t2_24T = 0.249631 mm
# Deflection caused by the tangential force of gear 3 at the mesh 3:
δ_t3_24T := F_T_2_24T*b_2_2r2*a_2_2l1/(6*L_shaft_2*E_shaft*I_shaft)*(L_shaft_2^2 - b_2_2r2^2 - a_2_2l1^2)
δ_t3_24T = 0.279919 mm
# Maximum deflection at mesh 2 due to tangential forces:
δ_t2_max := δ_t2_36T + δ_t2_24T
δ_t2_max = 0.537204 mm
# Maximum deflection at mesh 3 due to tangential forces:
δ_t3_max := δ_t3_36T + δ_t3_24T
δ_t3_max = 0.446339 mm
# Shaft 3
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# Shaft 3 has 24T spur gear and 12T bevel gear on it. Thus, it will experience both radial and tangential forces.
#
# Radial force will deflect the shaft vertically and the tangential force will deflect the shaft horizontally.
# Shaft 3 length:
L_shaft_3 := 45 mm
# Shaft 3 will experience radial forces caused by the 24T bevel gear and 12T spur gear. The deflection of interest will be at the two points at where the gears are meshing.
# First meshing distance from the left:
b_3_1l1 := 8 mm
# First meshing distance from the right:
a_3_1r1 := L_shaft_3 - b_3_1l1
a_3_1r1 = 37 mm
# Second meshing distance from the left:
a_3_2l1 := 26 mm
# Second meshing distance from the right:
b_3_2r2 := L_shaft_3 - a_3_2l1
b_3_2r2 = 19 mm
# Deflection due to radial force
# Radial force due to 24T bevel gear:
F_R_3_24T := 71.335 N
# Radial force due to 12T spur gear:
F_R_3_12T := 142.669 N
# For 24T bevel gear
# Deflection caused by the radial force of gear 2 at the mesh 3:
δ_m3_r3_24T := F_R_3_24T*b_3_1l1*a_3_1r1/(6*L_shaft_3*E_shaft*I_shaft)*(L_shaft_3^2 - b_3_1l1^2 - a_3_1r1^2)
δ_m3_r3_24T = 0.0271641 mm
# Deflection caused by the radial force of gear 2 at the mesh 4:
δ_m4_r3_24T := F_R_3_24T*b_3_2r2*b_3_1l1/(6*L_shaft_3*E_shaft*I_shaft)*(L_shaft_3^2 - b_3_2r2^2 - b_3_1l1^2)
δ_m4_r3_24T = 0.0377003 mm
# For 12T spur gear
# Deflection caused by the radial force of gear 3
# at the mesh 3:
δ_m3_r3_12T := F_R_3_12T*b_3_2r2*b_3_1l1/(6*L_shaft_3*E_shaft*I_shaft)*(L_shaft_3^2 - b_3_2r2^2 - b_3_1l1^2)
δ_m3_r3_12T = 0.0754001 mm
# Deflection caused by the radial force of gear 4 at the mesh 4:
δ_m4_r3_12T := F_R_3_12T*b_3_2r2*a_3_2l1/(6*L_shaft_3*E_shaft*I_shaft)*(L_shaft_3^2 - b_3_2r2^2 - a_3_2l1^2)
δ_m4_r3_12T = 0.151319 mm
# Maximum deflection at mesh 3 due to radial forces:
δ_m3_r3_max := δ_m3_r3_24T + δ_m3_r3_12T
δ_m3_r3_max = 0.102564 mm
# Maximum deflection at mesh 4 due to radial forces:
δ_m4_r3_max := δ_m4_r3_24T + δ_m4_r3_12T
δ_m4_r3_max = 0.189019 mm
# Deflection due to tangential force
# Tangential force due to 36T spur gear:
F_T_3_24T := 195.99 N
# Tangential force due to 24T bevel gear:
F_T_3_12T := 391.98 N
# For 24T bevel gear
# Deflection caused by the tangential force of gear 2 at the mesh 3:
δ_m3_t3_24T := F_T_3_24T*b_3_1l1*a_3_1r1/(6*L_shaft_3*E_shaft*I_shaft)*(L_shaft_3^2 - b_3_1l1^2 - a_3_1r1^2)
δ_m3_t3_24T = 0.0746322 mm
# Deflection caused by the tangential force of gear 2 at the mesh 4:
δ_m4_t3_24T := F_T_3_24T*b_3_2r2*b_3_1l1/(6*L_shaft_3*E_shaft*I_shaft)*(L_shaft_3^2 - b_3_2r2^2 - b_3_1l1^2)
δ_m4_t3_24T = 0.10358 mm
# For 12T spur gear
# Deflection caused by the tangential force of gear 3
# at the mesh 3:
δ_m3_t3_12T := F_T_3_12T*b_3_2r2*b_3_1l1/(6*L_shaft_3*E_shaft*I_shaft)*(L_shaft_3^2 - b_3_2r2^2 - b_3_1l1^2)
δ_m3_t3_12T = 0.20716 mm
# Deflection caused by the tangential force of gear 3 at the mesh 4:
δ_m4_t3_12T := F_T_3_12T*b_3_2r2*a_3_2l1/(6*L_shaft_3*E_shaft*I_shaft)*(L_shaft_3^2 - b_3_2r2^2 - a_3_2l1^2)
δ_m4_t3_12T = 0.415745 mm
# Maximum deflection at mesh 3 due to tangential forces:
δ_m3_t3_max := δ_m3_t3_24T + δ_m3_t3_12T
δ_m3_t3_max = 0.281792 mm
# Maximum deflection at mesh 4 due to tangential forces:
δ_m4_t3_max := δ_m4_t3_24T + δ_m4_t3_12T
δ_m4_t3_max = 0.519325 mm
# Shaft 4
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# Shaft 4 has 36T spur gear and 24T bevel gear on it. Thus, it will experience both radial and tangential forces.
#
# Radial force will deflect the shaft vertically and the tangential force will deflect the shaft horizontally.
# Shaft 4 length:
L_shaft_4 := 30 mm
# Shaft 3 will experience radial forces caused by the 24T bevel gear and 12T spur gear. The deflection of interest will be at the two points at where the gears are meshing.
# First meshing distance from the left:
b_4_1l1 := 11 mm
# First meshing distance from the right:
a_4_1r1 := L_shaft_4 - b_4_1l1
a_4_1r1 = 19 mm
# Second meshing distance from the left:
a_4_2l1 := 19 mm
# Second meshing distance from the right:
b_4_2r2 := L_shaft_4 - a_4_2l1
b_4_2r2 = 11 mm
# Deflection due to radial force
# Radial force due to 36T spur gear:
F_R_4_36T := 132.709 N
# Radial force due to 24T spur gear:
F_R_4_24T := 199.064 N
# For 36T spur gear
# Deflection caused by the radial force of gear 2 at the mesh 4:
δ_m4_r4_36T := F_R_4_36T*b_4_1l1*a_4_1r1/(6*L_shaft_4*E_shaft*I_shaft)*(L_shaft_4^2 - b_4_1l1^2 - a_4_1r1^2)
δ_m4_r4_36T = 0.0377914 mm
# Deflection caused by the radial force of gear 2 at the mesh 5:
δ_m5_r4_36T := F_R_4_36T*b_4_2r2*b_4_1l1/(6*L_shaft_4*E_shaft*I_shaft)*(L_shaft_4^2 - b_4_2r2^2 - b_4_1l1^2)
δ_m5_r4_36T = 0.0344415 mm
# For 24T spur gear
# Deflection caused by the radial force of gear 3
# at the mesh 4:
δ_m4_r4_24T := F_R_4_24T*b_4_2r2*b_4_1l1/(6*L_shaft_4*E_shaft*I_shaft)*(L_shaft_4^2 - b_4_2r2^2 - b_4_1l1^2)
δ_m4_r4_24T = 0.0516624 mm
# Deflection caused by the radial force of gear 4 at the mesh 5:
δ_m5_r4_24T := F_R_4_24T*b_4_2r2*a_4_2l1/(6*L_shaft_4*E_shaft*I_shaft)*(L_shaft_4^2 - b_4_2r2^2 - a_4_2l1^2)
δ_m5_r4_24T = 0.0566873 mm
# Maximum deflection at mesh 4 due to radial forces:
δ_m4_r4_max := δ_m4_r4_36T + δ_m4_r4_24T
δ_m4_r4_max = 0.0894538 mm
# Maximum deflection at mesh 5 due to radial forces:
δ_m5_r4_max := δ_m5_r4_36T + δ_m5_r4_24T
δ_m4_r4_max = 0.0894538 mm
# Deflection due to tangential force
# Tangential force due to 36T spur gear:
F_T_4_36T := 364 N
# Tangential force due to 24T bevel gear:
F_T_4_24T := 546.923 N
# For 36T spur gear
# Deflection caused by the tangential force of gear 2 at the mesh 4:
δ_m4_t4_36T := F_T_4_36T*b_4_1l1*a_4_1r1/(6*L_shaft_4*E_shaft*I_shaft)*(L_shaft_4^2 - b_4_1l1^2 - a_4_1r1^2)
δ_m4_t4_36T = 0.103656 mm
# Deflection caused by the tangential force of gear 2 at the mesh 5:
δ_m5_t4_36T := F_T_4_36T*b_4_2r2*b_4_1l1/(6*L_shaft_4*E_shaft*I_shaft)*(L_shaft_4^2 - b_4_2r2^2 - b_4_1l1^2)
δ_m5_t4_36T = 0.0944676 mm
# For 24T spur gear
# Deflection caused by the tangential force of gear 3
# at the mesh 4:
δ_m4_t4_24T := F_T_4_24T*b_4_2r2*b_4_1l1/(6*L_shaft_4*E_shaft*I_shaft)*(L_shaft_4^2 - b_4_2r2^2 - b_4_1l1^2)
δ_m4_t4_24T = 0.141941 mm
# Deflection caused by the tangential force of gear 3 at the mesh 5:
δ_m5_t4_24T := F_T_4_24T*b_4_2r2*a_4_2l1/(6*L_shaft_4*E_shaft*I_shaft)*(L_shaft_4^2 - b_4_2r2^2 - a_4_2l1^2)
δ_m5_t4_24T = 0.155747 mm
# Maximum deflection at mesh 4 due to tangential forces:
δ_m4_t4_max := δ_m4_t4_36T + δ_m4_t4_24T
δ_m4_t4_max = 0.245597 mm
# Maximum deflection at mesh 5 due to tangential forces:
δ_m5_t4_max := δ_m5_t4_36T + δ_m5_t4_24T
δ_m4_t4_max = 0.245597 mm
# Shaft 5
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# Shaft 5 has 48T spur gear on it. Thus, it will experience both radial and tangential forces.
#
# Radial force will deflect the shaft vertically and the tangential force will deflect the shaft horizontally.
# Shaft 5 length:
L_shaft_5 := 30 mm
# Shaft 5 will experience radial forces caused by the 24T bevel gear and 12T spur gear. The deflection of interest will be at the two points at where the gears are meshing.
# First meshing distance from the left:
b_5_1l1 := 18.57 mm
# First meshing distance from the right:
a_5_1r1 := L_shaft_5 - b_5_1l1
a_5_1r1 = 11.43 mm
# Deflection due to radial force
# Radial force due to 48T spur gear:
F_R_5_48T := 190.144 N
# Deflection caused by the radial force of gear 2 at the mesh :
δ_m5_r5_48T := F_R_5_48T*b_5_1l1*a_5_1r1/(6*L_shaft_5*E_shaft*I_shaft)*(L_shaft_5^2 - b_5_1l1^2 - a_5_1r1^2)
δ_m5_r5_48T = 0.0558469 mm
# Deflection due to tangential force
# Tangential force due to 48T spur gear:
F_T_5_48T := 522.417 N
# Deflection caused by the tangential force of gear 2 at the mesh 5:
δ_m5_t5_48T := F_T_5_48T*b_5_1l1*a_5_1r1/(6*L_shaft_5*E_shaft*I_shaft)*(L_shaft_5^2 - b_5_1l1^2 - a_5_1r1^2)
δ_m5_t5_48T = 0.153438 mm
# Shaft 6
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# Shaft 6 has 48T spur gear on it. Thus, it will experience both radial and tangential forces.
#
# Radial force will deflect the shaft vertically and the tangential force will deflect the shaft horizontally.
# Shaft 5 length:
L_shaft_6 := 54.2 mm
# Shaft 5 will experience radial forces caused by the 24T bevel gear and 12T spur gear. The deflection of interest will be at the two points at where the gears are meshing.
# First meshing distance from the left:
b_6_1l1 := 11 mm
# First meshing distance from the right:
a_6_1r1 := L_shaft_6 - b_6_1l1
a_6_1r1 = 43.2 mm
# Deflection due to radial force
# Radial force due to 48T spur gear:
F_R_6_48T := 185.166 N
# Deflection caused by the radial force of gear 2 at the mesh 6:
δ_m6_r6_48T := F_R_6_48T*b_6_1l1*a_6_1r1/(6*L_shaft_6*E_shaft*I_shaft)*(L_shaft_6^2 - b_6_1l1^2 - a_6_1r1^2)
δ_m6_r6_48T = 0.150882 mm
# Deflection due to tangential force
# Tangential force due to 48T spur gear:
F_T_6_48T := 508.74 N
# Deflection caused by the tangential force of gear 2 at the mesh 5:
δ_m6_t6_48T := F_T_6_48T*b_6_1l1*a_6_1r1/(6*L_shaft_6*E_shaft*I_shaft)*(L_shaft_6^2 - b_6_1l1^2 - a_6_1r1^2)
δ_m6_t6_48T = 0.414544 mm
