# In Appendix B the 100 rpm motor was selected. Its calculated properties are listed below:
# The maximum motor
# current:
I_max := 2.936 A
# The maximum output torque:
T_max := 1.211 N*m
# The maximum output speed:
w_max := 11.367 rad/s
# The maximum overload time to trip:
t_max_trip := 3.091 s
# In Appendix A the required bending moment to bend the pipe was determined to be the following:
# Bending moment required to bend the pipe:
M_required := 12.922 N*m
# Before selecting the gears, the required gear ratio needs to be determined. The required gear ratio will be determined using the required bending moment and the peak output torque of the motor.
# Required gear ratio:
GR_required := M_required/T_max
GR_required = 10.6705
# Therefore, the gear train ratio has to be equal to the required gear ratio taking into account all the efficiencies.
#
# Through trial and error, and taking into account the shape of the model and the user requirements. Below is how the gear train is designed.
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# Gears | Driven by | Drives | On the same shaft as
# 12T spur gear | The motor | 36T spur gear | -
# 36T spur gear | 12T spur gear | - | 24T bevel gear
# 24T bevel gear | - | 24T bevel gear | 36T spur gear
# 24T bevel gear | 24T bevel gear | - | 12T spur gear
# 12T spur gear | - | 36T spur gear | 24T bevel gear
# 36T spur gear | 12T spur gear | - | 24T spur gear
# 24T spur gear | - | 48T spur gear | 36T spur gear
# 48T spur gear | 24T spur gear | - | -
# Figure 2: Table summarising the gearbox design.
#
# In the table above each gear is given its own colour to make it easy for the reader to follow. The table also shows which gears are driven, which gears drives and which gears are on the same shaft.
# Using figure 1 and 2, the meshing gears can be shown in the table below.
# | Meshing gears
# Mesh 1 | 12T spur gear with 36T spur gear
# Mesh 2 | 24T bevel gear with 24T bevel gear
# Mesh 3 | 12T spur gear with 36T spur gear
# Mesh 4 | 24T spur gear with 48T spur gear
# Figure 3: Table showing meshing gears
#
# Using the above table, the gear train efficiency can be calculated
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# The above equation from the gearbox efficiency document will be used to calculate the efficiency between two meshing spur gears.
#
# The same equation will be used to calculate the efficiency for bevel gears because the friction on bevel gears is very similar to spur gears.
#
# Assuming that the gear that will be used is made up of Dry Acetal on Acetal plastic, the coefficient that will be used is 0.2.
# Mesh 1 (12T spur gear with 36T spur gear):
η_mesh_1 := 1 - 0.2*π*(1/12 + 1/36)
η_mesh_1 = 0.930187
# Mesh 2 (24T bevel gear with 24T bevel gear):
η_mesh_2 := 1 - 0.2*π*(1/24 + 1/24)
η_mesh_2 = 0.94764
# Mesh 3 (12T spur gear with 36T spur gear):
η_mesh_3 := 1 - 0.2*π*(1/12 + 1/36)
η_mesh_3 = 0.930187
# Mesh 4 (24T spur gear with 48T spur gear):
η_mesh_4 := 1 - 0.2*π*(1/24 + 1/48)
η_mesh_4 = 0.96073
# Mesh 5 (48T spur gear with 48T spur gear):
η_mesh_5 := 1 - 0.2*π*(1/48 + 1/48)
η_mesh_5 = 0.97382
# Now that the efficiency for all the meshing gears is determined, the gear train efficiency can be determined.
# Gear train efficiency:
η_gear_train := η_mesh_1*η_mesh_2*η_mesh_3*η_mesh_4*η_mesh_5
η_gear_train = 0.767121
# The gear ratio of the gearbox can be determined using figure 3, taking into only meshing gears.
# Gear 1 (12T spur gear with 36T spur gear):
GR_1 := 36/12
GR_1 = 3
# Gear 2 (24T bevel gear with 24T bevel gear):
GR_2 := 24/24
GR_2 = 1
# Gear 3 (12T spur gear with 36T spur gear):
GR_3 := 36/12
GR_3 = 3
# Gear 4 (24T spur gear with 48T spur gear):
GR_4 := 48/24
GR_4 = 2
# Gear 5 (48T spur gear with 48T spur gear):
GR_5 := 48/48
GR_5 = 1
# Now that the gear ratio for all the meshing gears is determined, the gear train ratio can be determined, taking into account the efficiency.
# Gear train ratio:
GR_gear_train := GR_1*GR_2*GR_3*GR_4*GR_5*η_gear_train
GR_gear_train = 13.8082
# The gear train ratio works out perfectly because it greater than the required gear ratio, which is GR_required = 10.6705.
#
# Now the actual current, output torque, output speed and trip time for the motor can be calculated.
# Actual output motor torque:
T_actual := M_required/GR_gear_train
T_actual = 0.935822 N*m
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# Figure 4: Motor torque equation
#
# The above equation is from the motor specification document, it will be used to calculate the operating motor current. The motor specification document also gives the values for the constant in the equation.
# Gearbox reduction ratio:
r_g := 156.8
# Gearbox efficiency:
η_g := 0.7
# Static drag:
T_0 := 110*N*mm
# Torque constant:
K_T := 4.1 N*mm/A
# Armature resistance:
R_a := 1.87 Ω
# Operating motor current:
I_actual := (T_actual - T_0)/(K_T*r_g*η_g)
I_actual = 1.8351 A
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# Figure 5: Motor speed equation
#
# The above equation is from the motor specification document, it will be used to calculate the motor output speed.
# Supply voltage to the motor calculated in Appendix B:
V_supply := 12.8 V
# Motor output speed:
w_actual := (V_supply - I_actual*R_a)/(K_T*r_g)
w_actual = 14.5725 rad/s
# Overload time to trip:
t_actual_trip := 140*(I_actual/(1*A))^-3.54*s
t_actual_trip = 16.3221 s
# | Peak condition | Actual condition
# Current [A] | 2.936 | 1.847
# Output speed [rad/s] | 11.367 | 14.537
# Output torque [Nm] | 1.211 | 0.941
# Trip time [s] | 3.091 | 15.948
# Figure 6: Comparing peak conditions and actual conditions
#
# The table above the shows the difference when the motor is operating at its peak and at its actual point.
#
# Now the torque and forces experienced by each gear can calculated. The efficiencies for all the meshing gears are calculated.
# Gear 1
# Gear 1 is a spur gear driven by the motor through a shaft.
# Number of teeth of gear 1:
N_gear_1 := 12
# Diameter of gear 1:
D_gear_1 := 12.7 mm
# Pressure angle of gear 1:
θ_gear_1 := 20°
# Speed of gear 1:
w_gear_1 := w_actual
w_gear_1 = 14.5725 rad/s
# Torque of gear 1:
T_gear_1 := T_actual
T_gear_1 = 0.935822 N*m
# Tangential force of gear 1:
F_tan_gear_1 := T_gear_1/(D_gear_1*0.5)
F_tan_gear_1 = 147.374 N
# Radial force of gear 1:
F_rad_gear_1 := F_tan_gear_1*tan(θ_gear_1)
F_rad_gear_1 = 53.6396 N
# Gear 2
# Gear 2 is a spur gear that meshes with gear 1. The efficiency is already calculated earlier in this section.
# Number of teeth of gear 2:
N_gear_2 := 36
# Diameter of gear 2:
D_gear_2 := 38.1 mm
# Pressure angle of gear 2:
θ_gear_2 := 20°
# Speed of gear 2:
w_gear_2 := N_gear_1/N_gear_2*w_gear_1*η_mesh_1
w_gear_2 = 4.51838 rad/s
# Torque of gear 2:
T_gear_2 := N_gear_2/N_gear_1*T_gear_1*η_mesh_1
T_gear_2 = 2.61147 N*m
# Tangential force of gear 2:
F_tan_gear_2 := T_gear_2/(D_gear_2*0.5)
F_tan_gear_2 = 137.085 N
# Radial force of gear 2:
F_rad_gear_2 := F_tan_gear_2*tan(θ_gear_2)
F_rad_gear_2 = 49.8948 N
# Gear 3
# Gear 3 is a bevel gear and is on the shaft as gear 2.
# Number of teeth of gear 3:
N_gear_3 := 24
# Diameter of gear 3:
D_gear_3 := 25.4 mm
# Pressure angle of gear 3:
θ_gear_3 := 20°
# Speed of gear 3:
w_gear_3 := w_gear_2
w_gear_3 = 4.51838 rad/s
# Torque of gear 3:
T_gear_3 := T_gear_2
T_gear_3 = 2.61147 N*m
# Tangential force of gear 3:
F_tan_gear_3 := T_gear_3/(D_gear_3*0.5)
F_tan_gear_3 = 205.627 N
# Radial force of gear 3:
F_rad_gear_3 := F_tan_gear_3*tan(θ_gear_1)
F_rad_gear_3 = 74.8423 N
# Gear 4
# Gear 4 is a bevel gear that meshes with gear 3. The efficiency is already calculated earlier in this section.
# Number of teeth of gear 4:
N_gear_4 := 24
# Diameter of gear 4:
D_gear_4 := 25.4 mm
# Pressure angle of gear 4:
θ_gear_4 := 20°
# Speed of gear 4:
w_gear_4 := N_gear_3/N_gear_4*w_gear_3*η_mesh_2
w_gear_4 = 4.2818 rad/s
# Torque of gear 4:
T_gear_4 := N_gear_4/N_gear_3*T_gear_3*η_mesh_2
T_gear_4 = 2.47473 N*m
# Tangential force of gear 4:
F_tan_gear_4 := T_gear_4/(D_gear_4*0.5)
F_tan_gear_4 = 194.861 N
# Radial force of gear 4:
F_rad_gear_4 := F_tan_gear_4*tan(θ_gear_4)
F_rad_gear_4 = 70.9235 N
# Gear 5
# Gear 5 is a spur gear and it's on the shaft as gear 4.
# Number of teeth of gear 5:
N_gear_5 := 12
# Diameter of gear 5:
D_gear_5 := 12.7 mm
# Pressure angle of gear 5:
θ_gear_5 := 20°
# Speed of gear 5:
w_gear_5 := w_gear_4
w_gear_5 = 4.2818 rad/s
# Torque of gear 5:
T_gear_5 := T_gear_4
T_gear_5 = 2.47473 N*m
# Tangential force of gear 5:
F_tan_gear_5 := T_gear_5/(D_gear_5*0.5)
F_tan_gear_5 = 389.722 N
# Radial force of gear 5:
F_rad_gear_5 := F_tan_gear_5*tan(θ_gear_5)
F_rad_gear_5 = 141.847 N
# Gear 6
# Gear 6 is a spur gear that meshes with gear 5. The efficiency is already calculated earlier in this section.
# Number of teeth of gear 6:
N_gear_6 := 36
# Diameter of gear 6:
D_gear_6 := 38.1 mm
# Pressure angle of gear 6:
θ_gear_6 := 20°
# Speed of gear 6:
w_gear_6 := N_gear_5/N_gear_6*w_gear_5*η_mesh_3
w_gear_6 = 1.32763 rad/s
# Torque of gear 6:
T_gear_6 := N_gear_6/N_gear_5*T_gear_5*η_mesh_3
T_gear_6 = 6.90589 N*m
# Tangential force of gear 6:
F_tan_gear_6 := T_gear_6/(D_gear_6*0.5)
F_tan_gear_6 = 362.514 N
# Radial force of gear 6:
F_rad_gear_6 := F_tan_gear_6*tan(θ_gear_6)
F_rad_gear_6 = 131.944 N
# Gear 7
# Gear 7 is a spur gear and it's on the shaft as gear 6.
# Number of teeth of gear 7:
N_gear_7 := 24
# Diameter of gear 7:
D_gear_7 := 25.4 mm
# Pressure angle of gear 7:
θ_gear_7 := 20°
# Speed of gear 7:
w_gear_7 := w_gear_6
w_gear_7 = 1.32763 rad/s
# Torque of gear 7:
T_gear_7 := T_gear_6
T_gear_7 = 6.90589 N*m
# Tangential force of gear 7:
F_tan_gear_7 := T_gear_7/(D_gear_7*0.5)
F_tan_gear_7 = 543.771 N
# Radial force of gear 7:
F_rad_gear_7 := F_tan_gear_7*tan(θ_gear_7)
F_rad_gear_7 = 197.916 N
# Gear 8
# Gear 8 is a spur gear that meshes with gear 7. The efficiency is already calculated earlier in this section.
# Number of teeth of gear 8:
N_gear_8 := 48
# Diameter of gear 8:
D_gear_8 := 50.8 mm
# Pressure angle of gear 8:
θ_gear_8 := 20°
# Speed of gear 8:
w_gear_8 := N_gear_7/N_gear_8*w_gear_7*η_mesh_4
w_gear_8 = 0.637745 rad/s
# Torque of gear 8:
T_gear_8 := N_gear_8/N_gear_7*T_gear_7*η_mesh_4
T_gear_8 = 13.2694 N*m
# Tangential force of gear 8:
F_tan_gear_8 := T_gear_8/(D_gear_8*0.5)
F_tan_gear_8 = 522.417 N
# Radial force of gear 8:
F_rad_gear_8 := F_tan_gear_8*tan(θ_gear_8)
F_rad_gear_8 = 190.144 N
# Gear 9
# Gear 9 is a spur gear that meshes with gear 8. The efficiency is already calculated earlier in this section.
# Number of teeth of gear 8:
N_gear_9 := 48
# Diameter of gear 8:
D_gear_9 := 50.8 mm
# Pressure angle of gear 8:
θ_gear_9 := 20°
# Speed of gear 8:
w_gear_9 := N_gear_8/N_gear_9*w_gear_8*η_mesh_5
w_gear_9 = 0.621049 rad/s
# Torque of gear 8:
T_gear_9 := N_gear_9/N_gear_8*T_gear_8*η_mesh_5
T_gear_9 = 12.922 N*m
# Tangential force of gear 8:
F_tan_gear_9 := T_gear_9/(D_gear_9*0.5)
F_tan_gear_9 = 508.74 N
# Radial force of gear 8:
F_rad_gear_9 := F_tan_gear_9*tan(θ_gear_9)
F_rad_gear_9 = 185.166 N
# | Maximum Torque [Nm] | Experienced Torque [Nm] | Maximum tangential force [N] | Experienced tangential force [N] | Experienced radial force [N] | Rotational speed [rad/s]
# Gear 1 [12T] | 3 | 0.941 | 450 | 148.228 | 53.95 | 14.537
# Gear 2 [36T] | 3.4 | 2.627 | 700 | 137.879 | 50.184 | 4.508
# Gear 3 [24T] | 3 | 2.627 | 300 | 206.819 | 75.276 | 4.508
# Gear 4 [24T] | 3 | 2.489 | 300 | 195.99 | 71.335 | 4.272
# Gear 5 [12T] | 3 | 2.489 | 450 | 391.98 | 142.669 | 4.272
# Gear 6 [36T] | 3.4 | 6.946 | 700 | 364 | 132.709 | 1.324
# Gear 7 [24T] | 1 | 6.946 | 580 | 546.923 | 199.064 | 1.324
# Gear 8 [48T] | 1.2 | 13.269 | 580 | 522.417 | 190.144 | 0.638
# Gear 9 [48T] | 1.2 | 12.922 | 580 | 508.74 | 185.166 | 0.621
# Figure 6: Summary of gear calculations
#
# The above highlights which gears must be support in red, this is because the torque that their experiencing is more than the torque it can withstand.
#
# From the above table the following must be supported:
# Gear 6 (36T spur gear)
# Gear 7 (24T spur gear)
# Gear 8 (48T spur gear)
# Gear 9 (48T spur gear)
