# Notation:
# p :  density
# m :  mass
# V :  volume
# The mass of each part will be calculated using the below equation:
#
# Mass = density x volume
#
# Density will be a value specific to the material used. The volume will be a value from solidworks, because solidworks is able to calculate the volume of complex parts accurately.
# 3D printed parts
# The material that will be used for 3D printed parts is PLA plastic.
ρ_PLA := 1240*kg/m^3
# Battery holder
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V_bh := 30227.85*mm^3
m_bh := ρ_PLA*V_bh
m_bh = 0.0374825 kg
# Motor lifter
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V_ml := 2810.52*mm^3
m_ml := ρ_PLA*V_ml
m_ml = 0.00348504 kg
# Lower housing
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V_lh := 128903.53*mm^3
m_lh := ρ_PLA*V_lh
m_lh = 0.15984 kg
# Upper housing
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V_uh := 120305.23*mm^3
m_uh := ρ_PLA*V_uh
m_uh = 0.149178 kg
# Handle
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V_h := 77838.31*mm^3
m_h := ρ_PLA*V_h
m_h = 0.0965195 kg
# Angle lock
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V_al := 409.63*mm^3
m_al := ρ_PLA*V_al
m_al = 0.000507941 kg
# Microswitch holder
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V_mch := 3068.22*mm^3
m_mch := ρ_PLA*V_mch
m_mch = 0.00380459 kg
# Microswitch holder two
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V_mcht := 3223.97*mm^3
m_mcht := ρ_PLA*V_mcht
m_mcht = 0.00399772 kg
# Two microswitch upper holders
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V_muh := 1494.40*mm^3
m_muh := 2*ρ_PLA*V_muh
m_muh = 0.00370611 kg
# Two battery clamps
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V_b_clamp := 4286.19*mm^3
m_b_c := 2*ρ_PLA*V_b_clamp
m_b_c = 0.0106298 kg
M_3D_p := m_bh + m_ml + m_lh + m_uh + m_h + m_al + m_mch + m_mcht + m_muh + m_b_c
M_3D_p = 0.469152 kg
# Sheet metal parts
# Sheet metal will be made using hot rolled mild steel. The density varies based on the alloying constituents but usually ranges between 7750 and 8050 kg/m3.
#
# To design for maximum conditions, I'll assume that the density of hot rolled mild steel is 8050 kg/m3.
ρ_mild_steel := 8050*kg/m^3
# Base
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V_base := 20288.17*mm^3
m_base := ρ_mild_steel*V_base
m_base = 0.16332 kg
# Lower shaft support
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V_lss := 4197.34*mm^3
m_lss := ρ_mild_steel*V_lss
m_lss = 0.0337886 kg
# Upper shaft support
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V_uss := 5116.73*mm^3
m_uss := ρ_mild_steel*V_uss
m_uss = 0.0411897 kg
# Motor support
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V_motor_s := 4596.91*mm^3
m_motor_s := ρ_mild_steel*V_motor_s
m_motor_s = 0.0370051 kg
# Two sheet support
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V_sheet_s := 552.52*mm^3
m_sheet_s := 2*ρ_mild_steel*V_sheet_s
m_sheet_s = 0.00889557 kg
# Two double plate for 48T gear
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V_D_48T := 3049.80*mm^3
m_D_48T := 2*ρ_mild_steel*V_D_48T
m_D_48T = 0.0491018 kg
# Double plate for 36T gear
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V_D_36T := 689.14*mm^3
m_D_36T := ρ_mild_steel*V_D_36T
m_D_36T = 0.00554758 kg
# Double plate for 24T gear
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V_D_24T := 296.44*mm^3
m_D_24T := ρ_mild_steel*V_D_24T
m_D_24T = 0.00238634 kg
# Total mass of the machined parts:
M_s := m_base + m_lss + m_uss + m_motor_s + m_sheet_s + m_D_48T + m_D_36T + m_D_24T
M_s = 0.341234 kg
# Machined parts
# Machined components will be made up of low carbon steel. Low carbon steel has a density of
# 7850 kg/m3.
ρ_carbon_steel := 7850*kg/m^3
# Die positioner
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V_Die_p := 113.22*mm^3
m_Die_p := ρ_carbon_steel*V_Die_p
m_Die_p = 0.000888777 kg
# Die lock
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V_Die_l := 122.48*mm^3
m_Die_l := ρ_carbon_steel*V_Die_l
m_Die_l = 0.000961468 kg
# Clamp platform
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V_Clamp_p := 3055.02*mm^3
m_Clamp_p := ρ_carbon_steel*V_Clamp_p
m_Clamp_p = 0.0239819 kg
# Circular custom shaft
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V_Custom_s := 242.83*mm^3
m_Custom_s := ρ_carbon_steel*V_Custom_s
m_Custom_s = 0.00190622 kg
# Angle positioner
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V_Angle_p := 94.76*mm^3
m_Angle_p := ρ_carbon_steel*V_Angle_p
m_Angle_p = 0.000743866 kg
# Bending die
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V_Die_b := 229.77*mm^3
m_Die_b := ρ_carbon_steel*V_Die_b
m_Die_b = 0.00180369 kg
# Total mass of the machined parts:
M_machine := m_Die_p + m_Die_l + m_Clamp_p + m_Custom_s + m_Angle_p + m_Die_b
M_machine = 0.0302859 kg
# Bought parts
# Some parts will be bought.  Their mass is given.
# 100rpm Motor:
m_motor := 0.09*kg
# Two 12T spur gears:
m_12T_s := 2*1.2/1000*kg = 0.0024 kg
# Two 24T bevel gears:
m_24T_b := 2*1.2/1000*kg = 0.0024 kg
# Two 36T spur gears:
m_36T_s := 2*5.2/1000*kg = 0.0104 kg
# Two 48T spur gears:
m_48T_s := 2*7.5/1000*kg = 0.015 kg
# Square shaft 30 long:
m_30_sq := 77/1000*30/1000*kg = 0.00231 kg
# Square shaft 70 long:
m_70_sq := 77/1000*70/1000*kg = 0.00539 kg
# Square shaft 45 long:
m_45_sq := 77/1000*45/1000*kg = 0.003465 kg
# Three high strength square shaft 30 long:
m_30_hsq := 3*77/1000*30/1000*kg = 0.00693 kg
# Shaft coupler:
m_shaft_c := 2.3/1000*kg = 0.0023 kg
# Four cells with caps:
m_cell_w_caps := 4*54/1000*kg = 0.216 kg
# Two cell links:
m_cell_link := 2*1/1000*kg = 0.002 kg
# Fused link:
m_fused_link := 1.5/1000*kg = 0.0015 kg
# Two microswitches:
m_microswitch := 2*2.2/1000*kg = 0.0044 kg
# Ten spacers 3.2 long:
m_3.2_spacer := 10*0.25/1000*kg = 0.0025 kg
# Spacer 6.4 long:
m_6.4_spacer := 0.5/1000*kg = 0.0005 kg
# Three spacers 9.5 long:
m_9.5_spacer := 3*0.75/1000*kg = 0.00225 kg
# Two spacers 12.7 long:
m_12.7_spacer := 2*1/1000*kg = 0.002 kg
# Two button head screws:
m_b_screws := 2*1.3/1000*kg = 0.0026 kg
# Six (2.9x6.5) self tapping screws:
m_2.9x6.5_screws := 6*1.3/1000*kg = 0.0078 kg
# Twelve (3.5x9.5) self tapping screws:
m_3.5x9.5_screws := 12*1.5/1000*kg = 0.018 kg
# Four (4.2x16) self tapping screws:
m_4.2x16_screws := 12*1.6/1000*kg = 0.0192 kg
# Twenty one (4.2x9.5) self tapping screws:
m_4.2x9.5_screws := 21*1.6/1000*kg = 0.0336 kg
# Seven hex M5 (16x10) bolts:
m_16x10_bolt := 7*2.72/1000*kg = 0.01904 kg
# Seven hex M5 nut:
m_M5_nut := 7*0.85/1000*kg = 0.00595 kg
# Five hex M3 nut:
m_M3_nut := 5*0.85/1000*kg = 0.00425 kg
# Six M5 washers:
m_M5_washer := 6*0.44/1000*kg = 0.00264 kg
# Big roller:
m_Big_roller := 65/1000*kg = 0.065 kg
# Push button:
m_push_b := 27/1000*kg = 0.027 kg
# Control switch:
m_control_s := 30/1000*kg = 0.03 kg
M_1 := m_control_s + m_push_b + m_Big_roller + m_M5_washer + m_M5_nut + m_M3_nut + m_16x10_bolt + m_4.2x9.5_screws
M_2 := m_4.2x16_screws + m_3.5x9.5_screws + m_2.9x6.5_screws + m_b_screws + m_12.7_spacer + m_9.5_spacer + m_6.4_spacer
M_3 := m_3.2_spacer + m_microswitch + m_fused_link + m_cell_link + m_cell_w_caps + m_shaft_c + m_30_hsq + m_45_sq
M_4 := m_70_sq + m_30_sq + m_48T_s + m_36T_s + m_24T_b + m_12T_s + m_motor
# Total mass of the bought parts:
M_bought := M_1 + M_2 + M_3 + M_4
M_bought = 0.606825 kg
# Total CAD mass:
M_tot := M_bought + M_machine + M_s + M_3D_p
M_tot = 1.4475 kg
