# The motor calculations will be done in the following steps:
#
# 1. Choose the number of cells that will be used
# 2. Determine the stall current of the motor
# 3. Select a motor
# Choose the number of cells that will be used
# The motor specification document state that the maximum voltage 15V and the cell specification document state that the nominal voltage is 3.2V.
# Maximum voltage of that the motor can take:
V_max := 15 V
# The nominal cell voltage:
V_nominal := 3.2 V
# Therefore, using the above information the maximum number of cells that should be connected in series can be calculated.
# Maximum number of cells in series:
N_max := V_max/V_nominal
N_max = 4.6875
# Thus, the maximum number of cells in series should be 4.
# Number of cells chosen for the design:
N_cells := 4
# Supply voltage to the motor:
V_supply := V_nominal*N_cells
V_supply = 12.8 V
# Determine the stall current of the motor
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# Figure 1: Curves generated from the motor specification
# document
#
# The above figure is. The black lines depict that the
# maximum motor current occurs at half the stall current.
# Stall current occurs when the output speed is 0rpm.
# Thus, in order to determine the maximum motor operating current, stall current and torque must be calculated first.
#
# Stall current occurs at the output speed of 0rpm.
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# Figure 2: Output speed from the motor specification document
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# The equation from figure 2 reduces to the one on the left due to the output speed equating to 0rpm.
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# Figure 3: armature resistance equation from the motor specification document
# Using the reduced equation from figure 2 and the armature resistance equation from figure 3, the below calculations are done.
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# Quadratic equation will be used to
# solve for the stall current.
# Stall current:
I_stall := ((-1.43 + sqrt(1.43^2 - 4*0.15*(-12.8)))/(2*0.15)) A
I_stall = 5.62826 A
# Select a motor
# In order to select the correct motor, the maximum conditions of all the motors will be calculated.
# Now that stall current is determined. Stall torque can be calculated.
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# Figure 4: Output torque equation from the motor specification document
#
# The constants in the above equation are given in the motor specification document, they are listed below.
# Torque constant:
K_T := 4.1*N*mm/A
# For the 100 rpm motor
# Gearbox reduction ratio:
r_g_100 := 156.8
# Gearbox efficiency:
η_g_100 := 0.7
# Static drag:
T_0_100 := 110*N*mm
# Therefore, using the properties above stall torque can be calculated.
# Stall current for 100rpm motor:
T_stall_100 := I_stall*K_T*r_g_100*η_g_100 - T_0_100
T_stall_100 = 2.42281 N*m
# As explained in figure 1 that the maximum motor operating current is when the motor current is at half the stall current. The output torque equation from figure 4 will be used to solve for the maximum motor current.
# The maximum motor current for 100rpm motor:
I_max_100 := ((T_stall_100/2) + T_0_100)/(K_T*r_g_100*η_g_100)
I_max_100 = 2.93635 A
# Armature resistance for
# 100rpm motor:
R_a_100 := (1.61 + 0.15*(I_max_100/(1 A) - 1.2)) Ω
R_a_100 = 1.87045 Ω
# The maximum output torque
# for 100rpm motor:
T_max_100 := I_max_100*K_T*r_g_100*η_g_100 - T_0_100
T_max_100 = 1.2114 N*m
# Overload time to trip for
# 100rpm motor:
t_trip_100 := 140*(I_max_100/(1*A))^-3.54*s
t_trip_100 = 3.09094 s
# Output speed for
# 100rpm motor:
w_m_100 := (V_supply - I_max_100*R_a_100)/(K_T*r_g_100)
w_m_100 = 11.3671 rad/s
# For the 160 rpm motor
# Gearbox reduction ratio:
r_g_160 := 98
# Gearbox efficiency:
η_g_160 := 0.72
# Static drag:
T_0_160 := 85*N*mm
# As explained in figure 1 that the maximum motor operating current is when the motor current is at half the stall current. The output torque equation from figure 4 will be used to solve for the maximum motor current.
# Stall current for 160rpm motor:
T_stall_160 := I_stall*K_T*r_g_160*η_g_160 - T_0_160
T_stall_160 = 1.54323 N*m
# The maximum motor current for 160rpm motor:
I_max_160 := ((T_stall_160/2) + T_0_160)/(K_T*r_g_160*η_g_160)
I_max_160 = 2.96104 A
# Armature resistance for
# 160rpm motor:
R_a_160 := (1.61 + 0.15*(I_max_160/(1 A) - 1.2)) Ω
R_a_160 = 1.87416 Ω
# The maximum output torque
# for 160rpm motor:
T_max_160 := I_max_160*K_T*r_g_160*η_g_160 - T_0_160
T_max_160 = 0.771616 N*m
# Overload time to trip for
# 160rpm motor:
t_trip_160 := 140*(I_max_160/(1*A))^-3.54*s
t_trip_160 = 3.00066 s
# Output speed for
# 160rpm motor:
w_m_160 := (V_supply - I_max_160*R_a_160)/(K_T*r_g_160)
w_m_160 = 18.0452 rad/s
# For the 240 rpm motor
# Gearbox reduction ratio:
r_g_240 := 65.33
# Gearbox efficiency:
η_g_240 := 0.75
# Static drag:
T_0_240 := 65*N*mm
# As explained in figure 1 that the maximum motor operating current is when the motor current is at half the stall current. The output torque equation from figure 4 will be used to solve for the maximum motor current.
# Stall current for 240rpm motor:
T_stall_240 := I_stall*K_T*r_g_240*η_g_240 - T_0_240
T_stall_240 = 1.06566 N*m
# The maximum motor current for 240rpm motor:
I_max_240 := ((T_stall_240/2) + T_0_240)/(K_T*r_g_240*η_g_240)
I_max_240 = 2.97591 A
# Armature resistance for
# 240rpm motor:
R_a_240 := (1.61 + 0.15*(I_max_240/(1 A) - 1.2)) Ω
R_a_240 = 1.87639 Ω
# The maximum output torque
# for 240rpm motor:
T_max_240 := I_max_240*K_T*r_g_240*η_g_240 - T_0_240
T_max_240 = 0.53283 N*m
# Overload time to trip for
# 240rpm motor:
t_trip_240 := 140*(I_max_240/(1*A))^-3.54*s
t_trip_240 = 2.94791 s
# Output speed for
# 240rpm motor:
w_m_240 := (V_supply - I_max_240*R_a_240)/(K_T*r_g_240)
w_m_240 = 26.9403 rad/s
rpm_motor := 1
# The results for the different motors can be summarised in the below table.
table  # each column defines a variable
    Compare | Maximum_current (A) | Trip_time (s) | Output_torque (N*m) | Output_speed (rad/s)
    100*rpm_motor | 2.936 | 3.091 | 1.211 | 11.367
    160*rpm_motor | 2.961 | 3.001 | 0.772 | 18.045
    240*rpm_motor | 2.976 | 2.948 | 0.533 | 26.94
end table
# Thus, for this design the 100rpm motor will be used because it has the largest output torque and longest trip time.
#
# Largest output torque allows one to design the gearbox with a low gear ratio.
#
# Longest trip time gives the design more time to achieve the goal before it stops working.
