# | Maximum Torque [Nm] | Experienced Torque [Nm] | Maximum tangential force [N] | Experienced tangential force [N] | Experienced radial force [N] | Rotational speed [rad/s]
# Gear 1 [12T] | 3 | 0.941 | 450 | 148.228 | 53.95 | 14.537
# Gear 2 [36T] | 3.4 | 2.627 | 700 | 137.879 | 50.184 | 4.508
# Gear 3 [24T] | 3 | 2.627 | 300 | 206.819 | 75.276 | 4.508
# Gear 4 [24T] | 3 | 2.489 | 300 | 195.99 | 71.335 | 4.272
# Gear 5 [12T] | 3 | 2.489 | 450 | 391.98 | 142.669 | 4.272
# Gear 6 [36T] | 3.4 | 6.946 | 700 | 364 | 132.709 | 1.324
# Gear 7 [24T] | 1 | 6.946 | 580 | 546.923 | 199.064 | 1.324
# Gear 8 [48T] | 1.2 | 13.269 | 580 | 522.417 | 190.144 | 0.638
# Gear 9 [48T] | 1.2 | 12.922 | 580 | 508.74 | 185.166 | 0.621
# Figure 1: Summary of calculations from Appendix C
# In the summary calculations from figure 1, it can be seen that Gear 6, 7, 8 and 9 need to be reinforced because the torque they experience is greater that the torque it can withstand.
# Gear 6
# Gear 6 is 36 teeth spur gear.
# Gear 6 yield strength:
S_y_gear6 := 66 MPa
# Gear 6 maximum torque:
T_max_gear6 := 3.4 N*m
# Gear 6 boss thickness:
t_boss_gear6 := 9.5 mm
# The k-factor for gear 6 can be calculated using the above properties.
# Gear 6 k-factor:
k_gear6 := T_max_gear6/(t_boss_gear6*S_y_gear6)
k_gear6 = 5.42265 mm^2
# Now the thickness of the sheet metal plate can be determined.  Sheet metal is made with hot rolled mild plate
# The sheet metal plate yield strength:
S_y_plate1 := 250 MPa
# Torque experienced by the plate:
T_plate1 := 6.946 N*m
k_gear6 := 39 mm^2
# Plate thickness needed by the plate:
t_plate1 := T_plate1/(k_gear6*S_y_plate1)
t_plate1 = 0.71241 mm
# Gear 7
# Gear 7 is 24 teeth spur gear.
# Gear 7 yield strength:
S_y_gear7 := 66 MPa
# Gear 7 maximum torque:
T_max_gear7 := 1 N*m
# Gear 7 boss thickness:
t_boss_gear7 := 9.5 mm
# The k-factor for gear 7 can be calculated using the above properties.
# Gear 7 k-factor:
k_gear7 := T_max_gear7/(t_boss_gear7*S_y_gear7)
k_gear7 = 1.5949 mm^2
# Now the thickness of the sheet metal plate can be determined.  Sheet metal is made with hot rolled mild plate
# The sheet metal plate yield strength:
S_y_plate7 := 250 MPa
# Torque experienced by the plate:
T_plate7 := 6.946 N*m
k_gear7 := 29 mm^2
# Plate thickness needed by the plate:
t_plate7 := T_plate7/(k_gear7*S_y_plate7)
t_plate7 = 0.958069 mm
# Gear 8
# Gear 8 is 48 teeth spur gear.
# Gear 8 yield strength:
S_y_gear8 := 66 MPa
# Gear 8 maximum torque:
T_max_gear8 := 1 N*m
# Gear 8 boss thickness:
t_boss_gear8 := 9.5 mm
# The k-factor for gear 8 can be calculated using the above properties.
# Gear 8 k-factor:
k_gear8 := T_max_gear8/(t_boss_gear8*S_y_gear8)
k_gear8 = 1.5949 mm^2
# Now the thickness of the sheet metal plate can be determined.  Sheet metal is made with hot rolled mild plate
# The sheet metal plate yield strength:
S_y_plate8 := 250 MPa
# Torque experienced by the plate:
T_plate8 := 13.269 N*m
k_gear8 := 32 mm^2
# Plate thickness needed by the plate:
t_plate8 := T_plate8/(k_gear8*S_y_plate8)
t_plate8 = 1.65863 mm
# Gear 9
# Gear 9 is 48 teeth spur gear.
# Gear 9 yield strength:
S_y_gear9 := 66 MPa
# Gear 9 maximum torque:
T_max_gear9 := 1 N*m
# Gear 8 boss thickness:
t_boss_gear9 := 9.5 mm
# The k-factor for gear 8 can be calculated using the above properties.
# Gear 8 k-factor:
k_gear9 := T_max_gear9/(t_boss_gear9*S_y_gear9)
k_gear9 = 1.5949 mm^2
# Now the thickness of the sheet metal plate can be determined.  Sheet metal is made with hot rolled mild plate
# The sheet metal plate yield strength:
S_y_plate9 := 250 MPa
# Torque experienced by the plate:
T_plate9 := 12.922 N*m
k_gear9 := 32 mm^2
# Plate thickness needed by the plate:
t_plate9 := T_plate9/(k_gear9*S_y_plate9)
t_plate9 = 1.61525 mm
# | Maximum torque [Nm] | Experienced torque [Nm] | Plate thickness needed [mm]
# Gear 6 [36T] | 3.4 | 6.946 |
# Gear 7 [24T] | 1 | 6.946 |
# Gear 8 [48T] | 1.2 | 13.269 |
# Gear 9 [48T] | 1.2 | 12.922 |
# Figure 2: Summary table of plate thickness need
# The above table shows how much thickness is needed for the plates to reinforce the gears that need to be supported.
# Base
# The base of the  pipe bending platform has a lot of parts on it. Thus, it will experience forces due to the weight of the parts. The forces can be converted to stresses.
# Big roller
# Big roller mass:
M_big_roller := 22.72/1000*kg
# Big roller force:
F_big_roller := M_big_roller*(9.81 m/s^2)
F_big_roller = 0.222883 N
# Big roller outer radius:
OD_big_roller := (35/2) mm
# Big roller inner radius:
ID_big_roller := (8/2) mm
# Big roller area:
A_big_roller := π*(OD_big_roller^2 - ID_big_roller^2)
# Big roller stress:
σ_big_roller := F_big_roller/A_big_roller
σ_big_roller = 244.43 Pa
# Pipe support
# Pipe support mass:
M_pipe_s := 1.26/1000*kg
# Pipe support force:
F_pipe_s := M_pipe_s*(9.81 m/s^2)
F_pipe_s = 0.0123606 N
# Pipe support area:
A_pipe_s := 26*21 mm^2
# Pipe support stress:
σ_pipe_s := F_pipe_s/A_pipe_s
σ_pipe_s = 22.6385 Pa
# Lower & upper microswitch holder and microswitch
# Lower & upper microswitch holder and microswitch mass [lum]:
M_lum := 19.1/1000*kg
# Lower & upper microswitch holder and microswitch force [lum]:
F_lum := M_lum*(9.81 m/s^2)
F_lum = 0.187371 N
# Lower & upper microswitch holder and microswitch area [lum]:
A_lum := 26*7 mm^2
# Lower & upper microswitch holder and microswitch stress [lum]:
σ_lum := F_lum/A_lum
σ_lum = 1029.51 Pa
# Total stress on the base
# Total stress on the base:
σ_base_ex := σ_lum + σ_pipe_s + σ_big_roller
σ_base_ex = 0.00129658 MPa
# The base tensile strength at yield:
σ_base_yield := 220 MPa
# Factor of safety:
FOC_base := σ_base_yield/σ_base_ex
FOC_base = 169677
# Lower casing
# The base of the lower housing has a lot components, it will be 3D printed using PLA plastic. Thus, it needs to be ensured that it will not fail due bending.
# Total mass of the parts acting on the lower housing:
M_lower_s := 560/1000*kg
# Total mass of the parts acting on the lower housing:
F_lower_s := M_lower_s*(9.81 m/s^2)
F_lower_s = 5.4936 N
# Total mass of the parts acting on the lower housing:
A_lower_s := 44899.54 mm^2
# Total mass of the parts acting on the lower housing:
σ_lower_s := F_lower_s/A_lower_s
σ_lower_s = 122.353 Pa
# The stress experienced by the lower housing is very small compared to the lower housing flexural strength. Thus, the lower housing will be able to withstand bending forces applied perpendicular to its longitudinal axis.
# Flexural strength of the lower housing:
σ_flexural_lower_s := 80 MPa
# Factor of safety:
FOC_lower_s := σ_flexural_lower_s/σ_lower_s
FOC_lower_s = 653845
# Bending die
# Bending die is responsible for bending the pipe and it will be in contact with the pipe. Thus, the strength of the bending die needs to be determined.
#
# The bending die will be machined using low carbon steel
# Bending die tensile strength:
σ_tensile_die := 550 MPa
# Bending die yield strength:
σ_yield_die := 250 MPa
# The tensile stress experienced by the die can be determined. By first determining the force the will be experienced by the die.
# The calculate bending moment of the die:
M_die := 12.922 N*m
# The distance that the force is acting:
D_die := 10 mm
# The area that the force is acting:
A_die := 75.4 mm^2
# The force acting on the die:
F_die := M_die/D_die
F_die = 1292.2 N
# The tensile stress acting on the die:
σ_die_ex := F_die/A_die
σ_die_ex = 17.1379 MPa
# Factor of safety:
FOC_die := σ_tensile_die/σ_die_ex
FOC_die = 32.0926
# Handle
# The handle of the design will be responsible for allowing the user to lift the design, it will be 3D printed using PLA plastic. Thus, it needs to be ensured that it will not .
# Total mass of the parts acting on the handle:
M_handle := 1.11*kg
# Total mass of the parts acting on the handle:
F_handle := M_handle*(9.81 m/s^2)
F_handle = 10.8891 N
# Total mass of the parts acting on the handle:
A_handle := 44899.54 mm^2
# Total mass of the parts acting on the handle:
σ_handle_ex := F_handle/A_handle
σ_handle_ex = 242.521 Pa
# The stress experienced by the lower housing is very small compared to the lower housing flexural strength. Thus, the lower housing will be able to withstand bending forces applied perpendicular to its longitudinal axis.
# Flexural strength of the lower housing:
σ_flexural_handle := 80 MPa
# Factor of safety:
FOC_handle := σ_flexural_handle/σ_handle_ex
FOC_handle = 329868
