# | Maximum Torque [Nm] | Experienced Torque [Nm] | Maximum tangential force [N] | Experienced tangential force [N] | Experienced radial force [N] | Rotational speed [rad/s]
# Gear 1 [12T] | 3 | 0.941 | 450 | 148.228 | 53.95 | 14.537
# Gear 2 [36T] | 3.4 | 2.627 | 700 | 137.879 | 50.184 | 4.508
# Gear 3 [24T] | 3 | 2.627 | 300 | 206.819 | 75.276 | 4.508
# Gear 4 [24T] | 3 | 2.489 | 300 | 195.99 | 71.335 | 4.272
# Gear 5 [12T] | 3 | 2.489 | 450 | 391.98 | 142.669 | 4.272
# Gear 6 [36T] | 3.4 | 6.946 | 700 | 364 | 132.709 | 1.324
# Gear 7 [24T] | 1 | 6.946 | 580 | 546.923 | 199.064 | 1.324
# Gear 8 [48T] | 1.2 | 13.269 | 580 | 522.417 | 190.144 | 0.638
# Gear 9 [48T] | 1.2 | 12.922 | 580 | 508.74 | 185.166 | 0.621
# Figure 1: Table from appendix C
#
# The table above shows the summary torque calculated
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# The above equation from "Mechanic of Materials" 11th edition, written by Russell C. Hibbeler will be used to determine shear strength
# Shaft 1
# Given yield strength of the shaft:
σ_shaft_1 := 450 MPa
# Given maximum torque the shaft can withstand:
T_max_shaft1 := 5 N*m
# Radius of the cross section:
c_shaft_1 := 1.59 mm
# Polar moment of inertia of a square shaft:
J_shaft_1 := 2*c_shaft_1^4/6
J_shaft_1 = 2.13043 mm^4
# Maximum shear stress the shaft can withstand:
τ_max_shaft1 := T_max_shaft1*c_shaft_1/J_shaft_1
τ_max_shaft1 = 3.73164 GPa
# The shear strength that the shaft will experience will be calculated using the torque it is experiencing from table 1
# Shaft 1 experienced torque:
T_shaft1_ex := 0.941 N*m
# Shaft 1 experienced shear  stress:
τ_shaft1_ex := T_shaft1_ex*c_shaft_1/J_shaft_1
τ_shaft1_ex = 702.295 MPa
# Shaft 2
# Given yield strength of the shaft:
σ_shaft_2 := 450 MPa
# Given maximum torque the shaft can withstand:
T_max_shaft2 := 5 N*m
# Radius of the cross section:
c_shaft_2 := 1.59 mm
# Polar moment of inertia of a square shaft:
J_shaft_2 := 2*c_shaft_2^4/6
J_shaft_2 = 2.13043 mm^4
# Maximum shear stress the shaft can withstand:
τ_max_shaft2 := T_max_shaft2*c_shaft_2/J_shaft_2
τ_max_shaft2 = 3.73164 GPa
# The shear strength that the shaft will experience will be calculated using the torque it is experiencing from table 1
# Shaft 2 experienced torque:
T_shaft2_ex := 2.627 N*m
# Shaft 2 experienced shear  stress:
τ_shaft2_ex := T_shaft2_ex*c_shaft_2/J_shaft_2
τ_shaft2_ex = 1.9606 GPa
# Shaft 3
# Given yield strength of the shaft:
σ_shaft_3 := 450 MPa
# Given maximum torque the shaft can withstand:
T_max_shaft3 := 5 N*m
# Radius of the cross section:
c_shaft_3 := 1.59 mm
# Polar moment of inertia of a square shaft:
J_shaft_3 := 2*c_shaft_2^4/6
J_shaft_3 = 2.13043 mm^4
# Maximum shear stress the shaft can withstand:
τ_max_shaft3 := T_max_shaft3*c_shaft_3/J_shaft_3
τ_max_shaft3 = 3.73164 GPa
# The shear strength that the shaft will experience will be calculated using the torque it is experiencing from table 1
# Shaft 3 experienced torque:
T_shaft3_ex := 2.489 N*m
# Shaft 3 experienced shear  stress:
τ_shaft3_ex := T_shaft3_ex*c_shaft_3/J_shaft_3
τ_shaft3_ex = 1.85761 GPa
# Shaft 4
# Given yield strength of the shaft:
σ_shaft_4 := 450 MPa
# Given maximum torque the shaft can withstand:
T_max_shaft4 := 13 N*m
# Radius of the cross section:
c_shaft_4 := 1.59 mm
# Polar moment of inertia of a square shaft:
J_shaft_4 := 2*c_shaft_2^4/6
J_shaft_4 = 2.13043 mm^4
# Maximum shear stress the shaft can withstand:
τ_max_shaft4 := T_max_shaft4*c_shaft_4/J_shaft_4
τ_max_shaft4 = 9.70227 GPa
# The shear strength that the shaft will experience will be calculated using the torque it is experiencing from table 1
# Shaft 3 experienced torque:
T_shaft4_ex := 6.946 N*m
# Shaft 3 experienced shear  stress:
τ_shaft4_ex := T_shaft4_ex*c_shaft_4/J_shaft_4
τ_shaft4_ex = 5.184 GPa
# Shaft 5
# Given yield strength of the shaft:
σ_shaft_5 := 450 MPa
# Given maximum torque the shaft can withstand:
T_max_shaft5 := 15 N*m
# Radius of the cross section:
c_shaft_5 := 1.59 mm
# Polar moment of inertia of a square shaft:
J_shaft_5 := 2*c_shaft_2^4/6
J_shaft_5 = 2.13043 mm^4
# Maximum shear stress the shaft can withstand:
τ_max_shaft5 := T_max_shaft5*c_shaft_5/J_shaft_5
τ_max_shaft5 = 11.1949 GPa
# The shear strength that the shaft will experience will be calculated using the torque it is experiencing from table 1
# Shaft 3 experienced torque:
T_shaft5_ex := 13.269 N*m
# Shaft 3 experienced shear  stress:
τ_shaft5_ex := T_shaft5_ex*c_shaft_5/J_shaft_5
τ_shaft5_ex = 9.90303 GPa
# Shaft 6
# Given yield strength of the shaft:
σ_shaft_6 := 450 MPa
# Given maximum torque the shaft can withstand:
T_max_shaft6 := 15 N*m
# Radius of the cross section:
c_shaft_6 := 1.59 mm
# Polar moment of inertia of a square shaft:
J_shaft_6 := 2*c_shaft_6^4/6
J_shaft_6 = 2.13043 mm^4
# Maximum shear stress the shaft can withstand:
τ_max_shaft6 := T_max_shaft6*c_shaft_6/J_shaft_6
τ_max_shaft6 = 11.1949 GPa
# The shear strength that the shaft will experience will be calculated using the torque it is experiencing from table 1
# Shaft 3 experienced torque:
T_shaft6_ex := 12.922 N*m
# Shaft 3 experienced shear  stress:
τ_shaft6_ex := T_shaft6_ex*c_shaft_6/J_shaft_6
τ_shaft6_ex = 9.64405 GPa
